** ANSA_VERSION;25.1.3;
**
**
**  file created by  A N S A  Mon Jan 12 15:17:24 2026
**
**  output from :
**
**  D:/Charlotte/cmb247 - Segmentation/N01-015/N01-015_2026-01-09-PATIENTSPECIFI
** CM
**  ODS_LF_thick.ansa
**
**  Settings :
**
**  Output format : 2022
**
**  Output : Visible
**
*Heading
** Job name: Job-212-cordonlytrials-surfsegnucleus_1_0pt5_0pt1-NOconstrends Model name: N01-015_2026-02-03-cordonlytrials
** Generated by: Abaqus/CAE 2022
*Preprint, echo=NO, model=NO, history=NO, contact=NO
**
** PARTS
**
*Part, name=PART-1
*Node
      1,  -14.1828213,  -194.144516,    -129.2052
      2,  -13.2923813,  -194.889175,  -129.888519
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*Element, type=C3D8
    1,      4,     43,     46,      9,      3,     42,     45,      6
    2,      5,     44,     47,     11,      4,     43,     46,      9
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*Elset, elset=P1;LF
 27099, 27100, 27101, 27102, 27103, 27104
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*Elset, elset=P26;BONE
     1,     2,     3,     4,     5,     6
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*Elset, elset=P27;IVD
  5006,  5007,  5008,  5009,  5010,  5011
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*Elset, elset=P28;PLL
  3521,  3522,  3523,  3524,  3525,  3526
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** Section: Section-2-P26;BONE
*Solid Section, elset=P26;BONE, material=Bone
,
** Section: Section-4-P28;PLL
*Solid Section, elset=P28;PLL, material=PLL
,
** Section: Section-3-P27;IVD
*Solid Section, elset=P27;IVD, material=IVD
,
** Section: Section-1-P1;LF
*Solid Section, elset=P1;LF, material=LF
,
*End Part
**
*Part, name=PART-1_1
*Node
  76396,   2.59249854,  -154.641357,  -204.902969
  76397,   2.64263678,  -153.678101,  -206.049805
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*Element, type=C3D8
 8782, 76396, 82210, 82548, 76402, 76397, 82211, 82551, 76403
 8783, 76397, 82211, 82551, 76403, 76398, 82212, 82554, 76404
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*Elset, elset=Set-1
  8782,  8783,  8784,  8785,  8786,  8787
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*Elset, elset=Set-2
  8782,  8783,  8784,  8785,  8786,  8787
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*Elset, elset=Set-3
  8782,  8783,  8784,  8785,  8786,  8787
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** Section: Cord
*Solid Section, elset=Set-3, material=Cord
,
*End Part
**
**
** ASSEMBLY
**
*Assembly, name=Assembly
**
*Instance, name=PART-1-1, part=PART-1
*End Instance
**
*Instance, name=PART-1_1-1, part=PART-1_1
*End Instance
**
*Node
      1,  -4.82850838,   -186.04187,  -85.0207977
*Node
      2,  0.822415888,  -167.909302,  -222.203705
*Node
      3,  -5.62380505,  -174.271973,   -105.97538
*Node
      4,  0.999660552,   -149.40181,  -215.725861
*Nset, nset=Set-1-c2-top, instance=PART-1-1
    39,    40,    41,    72,    73,    74
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*Nset, nset=Set-2-c7-base, instance=PART-1-1
 57888, 58226, 58258, 58378, 58384, 58390
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*Nset, nset=Set-5, instance=PART-1_1-1
 89942, 89944, 89946, 89949, 89950, 89952
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*Nset, nset=Set-6-cord, instance=PART-1_1-1
 76396, 76397, 76398, 76399, 76400, 76401
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*Nset, nset=Set-7-cordbase, instance=PART-1_1-1
 76401, 76407, 82182, 82195, 82202, 82209
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*Nset, nset=Set-8-cordtop, instance=PART-1_1-1, generate
 92554,  92872,      6
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*Nset, nset=m_Set-3
 1,
*Nset, nset=m_Set-4
 2,
*Nset, nset=m_Set-10
 4,
*Nset, nset=s_Set-9
 3,
*Elset, elset=_Cord_Surf_S1, internal, instance=PART-1_1-1, generate
 76351,  76585,      6
*Elset, elset=_Cord_Surf_S2, internal, instance=PART-1_1-1
  8786,  8791,  8796,  8801,  9339,  9344
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*Elset, elset=_Cord_Surf_S3, internal, instance=PART-1_1-1
  8782,  8783,  8784,  8785,  8786,  9340
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*Elset, elset=_Cord_Surf_S4, internal, instance=PART-1_1-1
 73200, 73201, 73202, 73203, 73204, 73205
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*Elset, elset=_Cord_Surf_S5, internal, instance=PART-1_1-1
  9325,  9326,  9327,  9328,  9339, 23006
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*Elset, elset=_Cord_Surf_S6, internal, instance=PART-1_1-1
  8782,  8783,  8784,  8785,  8786,  8787
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*Surface, type=ELEMENT, name=Cord_Surf
_Cord_Surf_S1, S1
_Cord_Surf_S2, S2
_Cord_Surf_S4, S4
_Cord_Surf_S6, S6
_Cord_Surf_S3, S3
_Cord_Surf_S5, S5
*Elset, elset=_Surf-2-Spine_S1, internal, instance=PART-1-1
  2525,  2532,  2539,  2546,  2635,  2640
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*Elset, elset=_Surf-2-Spine_S2, internal, instance=PART-1-1
   595,   597,   599,   601,   603,   605
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*Elset, elset=_Surf-2-Spine_S3, internal, instance=PART-1-1
   221,   222,   223,   224,   225,   286
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*Elset, elset=_Surf-2-Spine_S4, internal, instance=PART-1-1
   141,   142,   143,   144,   145,   146
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*Elset, elset=_Surf-2-Spine_S5, internal, instance=PART-1-1
    19,    20,    39,    40,    59,    60
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*Elset, elset=_Surf-2-Spine_S6, internal, instance=PART-1-1
   226,   227,   228,   229,   230,   231
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*Surface, type=ELEMENT, name=Surf-2-Spine
_Surf-2-Spine_S1, S1
_Surf-2-Spine_S2, S2
_Surf-2-Spine_S4, S4
_Surf-2-Spine_S6, S6
_Surf-2-Spine_S3, S3
_Surf-2-Spine_S5, S5
*Surface, type=NODE, name=Set-1-c2-top_CNS_, internal
Set-1-c2-top, 1.
*Surface, type=NODE, name=Set-2-c7-base_CNS_, internal
Set-2-c7-base, 1.
*Surface, type=NODE, name=Set-8-cordtop_CNS_, internal
Set-8-cordtop, 1.
*Surface, type=NODE, name=Set-7-cordbase_CNS_, internal
Set-7-cordbase, 1.
** Constraint: Constraint-1-top
*Coupling, constraint name=Constraint-1-top, ref node=m_Set-3, surface=Set-1-c2-top_CNS_
*Kinematic
** Constraint: Constraint-2-base
*Coupling, constraint name=Constraint-2-base, ref node=m_Set-4, surface=Set-2-c7-base_CNS_
*Kinematic
** Constraint: Constraint-3-cordtop
*Coupling, constraint name=Constraint-3-cordtop, ref node=s_Set-9, surface=Set-8-cordtop_CNS_
*Kinematic
** Constraint: Constraint-4-cordbase
*Coupling, constraint name=Constraint-4-cordbase, ref node=m_Set-10, surface=Set-7-cordbase_CNS_
*Kinematic
*Nset, nset=SITE1_BAND_1, instance=PART-1_1-1
 89942, 89944, 89949, 89950, 89954, 89956
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*Nset, nset=SITE1_BAND_2, instance=PART-1_1-1
 89946, 89952, 89960, 89968, 89979, 89985
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*Nset, nset=SITE1_BAND_3, instance=PART-1_1-1
 89974, 89980, 90017, 90025, 90048, 90053
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*Nset, nset=SITE1_BAND_4, instance=PART-1_1-1
 89947, 89953, 89961, 89970, 89976, 89982
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*Nset, nset=SITE1_BAND_5, instance=PART-1_1-1
 89737, 89746, 89750, 89753, 89759, 89760
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*End Assembly
*Amplitude, name=Amp-1-preload, definition=SMOOTH STEP
             0.,              0.,              1.,              1.
**
** MATERIALS
**
*Material, name=Bone
*Elastic
12000., 0.3
*Material, name=Cord
*Expansion
1.,
*Hyperelastic, ogden
 0.0306, 7.52, 6.77
*Material, name=IVD
*Hyperelastic, mooney-rivlin
 0.56, 0.14,   1.
*Material, name=LF
*Elastic
 3.8, 0.3
*Material, name=PLL
*Elastic
 35.7, 0.3
**
** INTERACTION PROPERTIES
**
*Surface Interaction, name=IntProp-1
1.,
*Friction, slip tolerance=0.005
 0.05,
*Surface Behavior, pressure-overclosure=HARD
*Surface Interaction, name=IntProp-2
1.,
*Friction, slip tolerance=0.005
 0.1,
*Surface Behavior, pressure-overclosure=HARD
**
** BOUNDARY CONDITIONS
**
** Name: BC-1 Type: Displacement/Rotation
*Boundary
m_Set-4, 1, 1
m_Set-4, 2, 2
m_Set-4, 3, 3
**
** INTERACTIONS
**
** Interaction: Int-1
*Contact Pair, interaction=IntProp-1, type=SURFACE TO SURFACE
Surf-2-Spine,
** Interaction: Int-2
*Contact Pair, interaction=IntProp-2, type=SURFACE TO SURFACE
Cord_Surf, Surf-2-Spine
** ----------------------------------------------------------------
**
** STEP: Step-1
**
*Step, name=Step-1, nlgeom=YES
*Static, stabilize, factor=0.0002, allsdtol=0, continue=NO
0.02, 1., 1e-05, 1.
**
** PREDEFINED FIELDS
** Name: predefinedfield-1-fieldband1   Type: Temperature
*Temperature, amplitude=Amp-1-preload
SITE1_BAND_1, 0.15
** Name: predefinedfield-1-fieldband2   Type: Temperature
*Temperature, amplitude=Amp-1-preload
SITE1_BAND_2, 0.136
** Name: predefinedfield-1-fieldband3   Type: Temperature
*Temperature, amplitude=Amp-1-preload
SITE1_BAND_3, 0.098
** Name: predefinedfield-1-fieldband4   Type: Temperature
*Temperature, amplitude=Amp-1-preload
SITE1_BAND_4, 0.052
** Name: predefinedfield-1-fieldband5   Type: Temperature
*Temperature, amplitude=Amp-1-preload
SITE1_BAND_5, 0.014
**
**
** INTERACTIONS
**
** Contact Controls for Interaction: Int-1
*Contact Controls, main=Surf-2-Spine, secondary=Surf-2-Spine, reset
*Contact Controls, main=Surf-2-Spine, secondary=Surf-2-Spine, stabilize=1.
**
** OUTPUT REQUESTS
**
*Restart, write, frequency=0
**
** FIELD OUTPUT: F-Output-1
**
*Output, field
*Node Output
CF, NT, RF, U
*Element Output, directions=YES
LE, PE, PEEQ, PEMAG, S, TEMP
*Contact Output
CDISP, CSTRESS
**
** HISTORY OUTPUT: H-Output-1
**
*Output, history, variable=PRESELECT
*End Step
