**  ANSA_VERSION;25.1.3;
**
**
**   file created by  A N S A  Mon Jan 12 15:17:24 2026
**
**   output from :
**
**   D:/Charlotte/cmb247 - Segmentation/N01-015/N01-015_2026-01-09-PATIENTSPECIF
** I
**  CM
**   ODS_LF_thick.ansa
**
**   Settings :
**
**   Output format : 2022
**
**   Output : Visible
**
*Heading
** Job name: Job-302-test Model name: Job-212
** Generated by: Abaqus/CAE 2022
*Preprint, echo=NO, model=NO, history=NO, contact=NO
**
** PARTS
**
*Part, name=PART-1_1
*Node
  76396,   2.59249854,  -154.641357,  -204.902969
  76397,   2.64263678,  -153.678101,  -206.049805
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*Element, type=C3D8
 8782, 76396, 82210, 82548, 76402, 76397, 82211, 82551, 76403
 8783, 76397, 82211, 82551, 76403, 76398, 82212, 82554, 76404
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*Elset, elset=SET-1
  8782,  8783,  8784,  8785,  8786,  8787
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*Elset, elset=SET-2
  8782,  8783,  8784,  8785,  8786,  8787
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*Elset, elset=SET-3
  8782,  8783,  8784,  8785,  8786,  8787
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** Section: Section-5-SET-3
*Solid Section, elset=SET-3, material=CORD
,
*End Part
**
**
** ASSEMBLY
**
*Assembly, name=Assembly
**
*Instance, name=PART-1_1-1, part=PART-1_1
*End Instance
**
*Node
      1,  -4.82850838,   -186.04187,  -85.0207977
      2,  0.822415888,  -167.909302,  -222.203705
      3,  -5.62380505,  -174.271973,   -105.97538
      4,  0.999660552,   -149.40181,  -215.725861
*Nset, nset=M_SET-3
 1,
*Nset, nset=M_SET-4
 2,
*Nset, nset=M_SET-10
 4,
*Nset, nset=SET-5, instance=PART-1_1-1
 89942, 89944, 89946, 89949, 89950, 89952
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*Nset, nset=SET-6-CORD, instance=PART-1_1-1
 76396, 76397, 76398, 76399, 76400, 76401
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*Nset, nset=SET-7-CORDBASE, instance=PART-1_1-1
 76401, 76407, 82182, 82195, 82202, 82209
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*Nset, nset=SITE1_BAND_1, instance=PART-1_1-1
 89942, 89944, 89949, 89950, 89954, 89956
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*Nset, nset=SITE1_BAND_2, instance=PART-1_1-1
 89946, 89952, 89960, 89968, 89979, 89985
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*Nset, nset=SITE1_BAND_3, instance=PART-1_1-1
 89974, 89980, 90017, 90025, 90048, 90053
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*Nset, nset=SITE1_BAND_4, instance=PART-1_1-1
 89947, 89953, 89961, 89970, 89976, 89982
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*Nset, nset=SITE1_BAND_5, instance=PART-1_1-1
 89737, 89746, 89750, 89753, 89759, 89760
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*Elset, elset=_CORD_SURF_S1, internal, instance=PART-1_1-1, generate
 76351,  76585,      6
*Elset, elset=_CORD_SURF_S2, internal, instance=PART-1_1-1
  8786,  8791,  8796,  8801,  9339,  9344
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*Elset, elset=_CORD_SURF_S3, internal, instance=PART-1_1-1
  8782,  8783,  8784,  8785,  8786,  9340
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*Elset, elset=_CORD_SURF_S4, internal, instance=PART-1_1-1
 73200, 73201, 73202, 73203, 73204, 73205
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*Elset, elset=_CORD_SURF_S5, internal, instance=PART-1_1-1
  9325,  9326,  9327,  9328,  9339, 23006
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*Elset, elset=_CORD_SURF_S6, internal, instance=PART-1_1-1
  8782,  8783,  8784,  8785,  8786,  8787
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*Elset, elset=_CORD_SURF_S1_1, internal, instance=PART-1_1-1, generate
 76351,  76585,      6
*Elset, elset=_CORD_SURF_S2_1, internal, instance=PART-1_1-1
  8786,  8791,  8796,  8801,  9339,  9344
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*Elset, elset=_CORD_SURF_S4_1, internal, instance=PART-1_1-1
 73200, 73201, 73202, 73203, 73204, 73205
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*Elset, elset=_CORD_SURF_S6_1, internal, instance=PART-1_1-1
  8782,  8783,  8784,  8785,  8786,  8787
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*Elset, elset=_CORD_SURF_S3_1, internal, instance=PART-1_1-1
  8782,  8783,  8784,  8785,  8786,  9340
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*Elset, elset=_CORD_SURF_S5_1, internal, instance=PART-1_1-1
  9325,  9326,  9327,  9328,  9339, 23006
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*Surface, type=ELEMENT, name=CORD_SURF
_CORD_SURF_S1_1, S1
_CORD_SURF_S2_1, S2
_CORD_SURF_S4_1, S4
_CORD_SURF_S6_1, S6
_CORD_SURF_S3_1, S3
_CORD_SURF_S5_1, S5
*End Assembly
*Amplitude, name=AMP-1-PRELOAD, definition=SMOOTH STEP
             0.,              0.,              1.,              1.
**
** MATERIALS
**
*Material, name=BONE
*Elastic
12000., 0.3
*Material, name=CORD
*Expansion
1.,
*Hyperelastic, ogden
 0.0306, 7.52, 6.77
*Material, name=IVD
*Hyperelastic, mooney-rivlin
 0.56, 0.14,   1.
*Material, name=LF
*Elastic
 3.8, 0.3
*Material, name=PLL
*Elastic
 35.7, 0.3
**
** INTERACTION PROPERTIES
**
*Surface Interaction, name=INTPROP-1
1.,
*Friction, slip tolerance=0.005
 0.05,
*Surface Behavior, pressure-overclosure=HARD
*Surface Interaction, name=INTPROP-2
1.,
*Friction, slip tolerance=0.005
 0.1,
*Surface Behavior, pressure-overclosure=HARD
** ----------------------------------------------------------------
**
** STEP: Step-1
**
*Step, name=Step-1, nlgeom=YES
*Static, stabilize, factor=0.0002, allsdtol=0., continue=NO
0.02, 1., 1e-05, 1.
**
** PREDEFINED FIELDS
**
** Name: Field-1   Type: Temperature
*Temperature, amplitude=AMP-1-PRELOAD
SITE1_BAND_1, 0.15
** Name: Field-2   Type: Temperature
*Temperature, amplitude=AMP-1-PRELOAD
SITE1_BAND_2, 0.136
** Name: Field-3   Type: Temperature
*Temperature, amplitude=AMP-1-PRELOAD
SITE1_BAND_3, 0.098
** Name: Field-4   Type: Temperature
*Temperature, amplitude=AMP-1-PRELOAD
SITE1_BAND_4, 0.052
** Name: Field-5   Type: Temperature
*Temperature, amplitude=AMP-1-PRELOAD
SITE1_BAND_5, 0.014
**
** OUTPUT REQUESTS
**
*Restart, write, frequency=0
**
** FIELD OUTPUT: F-Output-3
**
*Output, field
*Contact Output
CDISP, CSTRESS
**
** FIELD OUTPUT: F-Output-1
**
*Node Output
CF, NT, RF, U
**
** FIELD OUTPUT: F-Output-2
**
*Element Output, directions=YES
LE, PE, PEEQ, PEMAG, S, TEMP
**
** HISTORY OUTPUT: H-Output-1
**
*Output, history, variable=PRESELECT
*End Step
