** ANSA_VERSION;25.1.3;
**
**
**  file created by  A N S A  Mon Jan 12 15:17:24 2026
**
**  output from :
**
**  D:/Charlotte/cmb247 - Segmentation/N01-015/N01-015_2026-01-09-PATIENTSPECIFI
** CM
**  ODS_LF_thick.ansa
**
**  Settings :
**
**  Output format : 2022
**
**  Output : Visible
**
*Heading
** Job name: Job-N01-015-TEMPLATE_INP Model name: N01-015_2026-02-09-scripting
** Generated by: Abaqus/CAE 2022
*Preprint, echo=NO, model=NO, history=NO, contact=NO
**
** PARTS
**
*Part, name=PART-1_1
*Node
  76396,   2.59249854,  -154.641357,  -204.902969
  76397,   2.64263678,  -153.678101,  -206.049805
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*Element, type=C3D8
 8782, 76396, 82210, 82548, 76402, 76397, 82211, 82551, 76403
 8783, 76397, 82211, 82551, 76403, 76398, 82212, 82554, 76404
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*Elset, elset=Set-1
  8782,  8783,  8784,  8785,  8786,  8787
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*Elset, elset=Set-2
  8782,  8783,  8784,  8785,  8786,  8787
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*Elset, elset=Set-3
  8782,  8783,  8784,  8785,  8786,  8787
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** Section: Cord
*Solid Section, elset=Set-3, material=Cord
,
*End Part
**
**
** ASSEMBLY
**
*Assembly, name=Assembly
**
*Instance, name=PART-1_1-1, part=PART-1_1
*End Instance
**
*Node
      1,  -5.62380505,  -174.271973,   -105.97538
*Node
      2,  0.999660552,   -149.40181,  -215.725861
*Nset, nset=Set-5, instance=PART-1_1-1
 89942, 89944, 89946, 89949, 89950, 89952
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*Nset, nset=Set-6-cord, instance=PART-1_1-1
 76396, 76397, 76398, 76399, 76400, 76401
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*Nset, nset=Set-7-cordbase, instance=PART-1_1-1
 76401, 76407, 82182, 82195, 82202, 82209
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*Nset, nset=Set-8-cordtop, instance=PART-1_1-1, generate
 92554,  92872,      6
*Nset, nset=Set-11-cordseg, instance=PART-1_1-1
 89942, 89944, 89946, 89947, 89949, 89950
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*Nset, nset=Set-12-cord-surf-nucleus, instance=PART-1_1-1
 89977, 89979, 90023, 90024, 90051, 90052
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*Nset, nset=m_Set-10
 2,
*Nset, nset=s_Set-9
 1,
*Elset, elset=_Cord_Surf_S1, internal, instance=PART-1_1-1, generate
 76351,  76585,      6
*Elset, elset=_Cord_Surf_S2, internal, instance=PART-1_1-1
  8786,  8791,  8796,  8801,  9339,  9344
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*Elset, elset=_Cord_Surf_S3, internal, instance=PART-1_1-1
  8782,  8783,  8784,  8785,  8786,  9340
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*Elset, elset=_Cord_Surf_S4, internal, instance=PART-1_1-1
 73200, 73201, 73202, 73203, 73204, 73205
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*Elset, elset=_Cord_Surf_S5, internal, instance=PART-1_1-1
  9325,  9326,  9327,  9328,  9339, 23006
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*Elset, elset=_Cord_Surf_S6, internal, instance=PART-1_1-1
  8782,  8783,  8784,  8785,  8786,  8787
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*Surface, type=ELEMENT, name=Cord_Surf
_Cord_Surf_S1, S1
_Cord_Surf_S2, S2
_Cord_Surf_S4, S4
_Cord_Surf_S6, S6
_Cord_Surf_S3, S3
_Cord_Surf_S5, S5
*Surface, type=NODE, name=Set-8-cordtop_CNS_, internal
Set-8-cordtop, 1.
*Surface, type=NODE, name=Set-7-cordbase_CNS_, internal
Set-7-cordbase, 1.
** Constraint: Constraint-3-cordtop
*Coupling, constraint name=Constraint-3-cordtop, ref node=s_Set-9, surface=Set-8-cordtop_CNS_
*Kinematic
** Constraint: Constraint-4-cordbase
*Coupling, constraint name=Constraint-4-cordbase, ref node=m_Set-10, surface=Set-7-cordbase_CNS_
*Kinematic
*End Assembly
*Amplitude, name=Amp-1-preload, definition=SMOOTH STEP
             0.,              0.,              1.,              1.
**
** MATERIALS
**
*Material, name=Bone
*Elastic
12000., 0.3
*Material, name=Cord
*Expansion
1.,
*Hyperelastic, ogden
 0.0306, 7.52, 6.77
*Material, name=IVD
*Hyperelastic, mooney-rivlin
 0.56, 0.14,   1.
*Material, name=LF
*Elastic
 3.8, 0.3
*Material, name=PLL
*Elastic
 35.7, 0.3
**
** INTERACTION PROPERTIES
**
*Surface Interaction, name=IntProp-1
1.,
*Friction, slip tolerance=0.005
 0.05,
*Surface Behavior, pressure-overclosure=HARD
*Surface Interaction, name=IntProp-2
1.,
*Friction, slip tolerance=0.005
 0.1,
*Surface Behavior, pressure-overclosure=HARD
** ----------------------------------------------------------------
**
** STEP: Step-1
**
*Step, name=Step-1, nlgeom=YES
*Static, stabilize, factor=0.0002, allsdtol=0, continue=NO
0.02, 1., 1e-05, 1.
**
** BOUNDARY CONDITIONS
**
** Name: BC-2 Type: Symmetry/Antisymmetry/Encastre
*Boundary
m_Set-10, ENCASTRE
** Name: BC-3 Type: Symmetry/Antisymmetry/Encastre
*Boundary
s_Set-9, ENCASTRE
**
** OUTPUT REQUESTS
**
*Restart, write, frequency=0
**
** FIELD OUTPUT: F-Output-1
**
*Output, field
*Node Output
CF, NT, RF, U
*Element Output, directions=YES
LE, PE, PEEQ, PEMAG, S, TEMP
*Contact Output
CDISP, CSTRESS
**
** HISTORY OUTPUT: H-Output-1
**
*Output, history, variable=PRESELECT
*End Step
