*Heading
** Job name: Job-109 Model name: Model-1
** Generated by: Abaqus/CAE 2020
*Preprint, echo=NO, model=NO, history=NO, contact=NO
**
** PARTS
**
*Part, name=B_CB_Aligned
*Node
      1,   31.4619293,   65.5098038,   -40.543148
      2,    37.153553,   64.0522995,  -39.7871208
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*Element, type=C3D10M
   1,   681,   682,   683,   684,  1736,  1735,  1734,  1738,  1737,  1739
   2,   685,   686,   687,   688,  1742,  1741,  1740,  1744,  1743,  1745
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*Nset, nset=Set-1, generate
     1,  12381,      1
*Elset, elset=Set-1, generate
    1,  8238,     1
** Section: Brain
*Solid Section, elset=Set-1, material=Brain
,
*End Part
**
*Part, name=B_FALX_Surf_Straight
*Node
      1,   5.80579996,   68.7585983,   20.5653992
      2,   6.23619986,   62.2219009,   15.8056002
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*Element, type=S3R
1, 1, 2, 3
2, 4, 5, 6
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*Nset, nset=Set-1, generate
   1,  259,    1
*Elset, elset=Set-1, generate
   1,  411,    1
** Section: Shell
*Shell Section, elset=Set-1, material=Membrane_Section
0.1, 5
*End Part
**
*Part, name=B_Tent_L_Falxed
*Node
      1,   32.8963013,   47.3931999,  -13.4644003
      2,   35.7689018,   52.9847984,  -13.5724001
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*Element, type=S3R
1, 1, 2, 3
2, 4, 5, 6
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*Nset, nset=Set-1, generate
   1,  269,    1
*Elset, elset=Set-1, generate
   1,  405,    1
** Section: Shell
*Shell Section, elset=Set-1, material=Membrane_Section
0.1, 5
*End Part
**
*Part, name=B_Tent_R_Falxed
*Node
      1,  -28.9629993,   9.86929989,  -35.3196983
      2,  -28.4449997,   11.0879002,   -34.280201
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*Element, type=S3R
1, 1, 2, 3
2, 4, 5, 6
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*Nset, nset=Set-1, generate
   1,  280,    1
*Elset, elset=Set-1, generate
   1,  426,    1
** Section: Shell
*Shell Section, elset=Set-1, material=Membrane_Section
0.1, 5
*End Part
**
*Part, name=Brain-Holder-Connected_Surfs
*Node
      1,    51.959301,   -49.040699,   1.51689994
      2,   54.6618004,  -47.6721992,   4.49720001
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*Element, type=R3D3
1, 1, 2, 3
2, 4, 5, 6
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*Node
    791,   53.5713997,   57.6407013,   21.7261009
*Nset, nset=Brain-Holder-Connected_Surfs-RefPt_, internal
791,
*Elset, elset=Brain-Holder-Connected_Surfs, generate
    1,  1513,     1
*End Part
**
*Part, name=DC_Skull
*Node
      1,   -27.219862,  -62.5816078,  -6.45411825
      2,  -23.9941406,  -66.1207733,  -13.6191339
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*Element, type=R3D3
1, 1, 2, 3
2, 4, 5, 6
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*Node
   3111,   18.4008102,  -75.5366287,  -14.8480673
*Nset, nset=DC_Skull-RefPt_, internal
3111,
*Elset, elset=DC_Skull, generate
    1,  6220,     1
*End Part
**
*Part, name=E_GMVC
*Node
      1,  -22.0382004,   32.0214005,   55.6293983
      2,  -26.6664009,   34.6124992,   52.4721985
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*Element, type=C3D10M
    1,  2912,  2913,  2914,  2915,  8549,  8548,  8547,  8551,  8550,  8552
    2,  2912,  2916,  2917,  2918,  8555,  8554,  8553,  8557,  8556,  8558
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*Nset, nset=Set-1, generate
     1,  62364,      1
*Elset, elset=Set-1, generate
     1,  42370,      1
** Section: Brain
*Solid Section, elset=Set-1, material=Brain
,
*End Part
**
**
** ASSEMBLY
**
*Assembly, name=Assembly
**
*Instance, name=DC_Skull-1, part=DC_Skull
*End Instance
**
*Instance, name=B_CB_Aligned-1, part=B_CB_Aligned
*End Instance
**
*Instance, name=B_FALX_Surf_Straight-1, part=B_FALX_Surf_Straight
*End Instance
**
*Instance, name=B_Tent_L_Falxed-1, part=B_Tent_L_Falxed
*End Instance
**
*Instance, name=B_Tent_R_Falxed-1, part=B_Tent_R_Falxed
*End Instance
**
*Instance, name=E_GMVC-1, part=E_GMVC
*End Instance
**
*Instance, name=Brain-Holder-Connected_Surfs-1, part=Brain-Holder-Connected_Surfs
*End Instance
**
*Node
     12,   15.8890276,  -5.16394472,   17.2326202
*Node
     13,  -1.00517499, 0.0343979597,   14.8676805
*Node
     14,          40.,           5.,          20.
*Node
     15,         120.,           5.,          50.
*Node
     11,           0.,           0.,           0.
*Nset, nset=Brain-Holder-RP, instance=Brain-Holder-Connected_Surfs-1
 791,
*Nset, nset=DC-Skull-Node-Set, instance=DC_Skull-1, generate
    1,  3110,     1
*Nset, nset=DC-Skull-Node-Set
 11,
*Nset, nset=GM+CB, instance=B_CB_Aligned-1, generate
     1,  12381,      1
*Nset, nset=GM+CB, instance=E_GMVC-1, generate
     1,  62364,      1
*Elset, elset=GM+CB, instance=B_CB_Aligned-1, generate
    1,  8238,     1
*Elset, elset=GM+CB, instance=E_GMVC-1, generate
     1,  42370,      1
*Nset, nset=GM_Node_Set, instance=E_GMVC-1, generate
     1,  62364,      1
*Nset, nset=GM_Node_Set
 11,
*Nset, nset=NodesInsideSphereBIG, instance=E_GMVC-1
  2226,  2256,  2257,  2258,  2260,  2282
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*Nset, nset=NodesOutsideSphereBIG, instance=E_GMVC-1
     1,     2,     3,     4,     5,     6
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*Nset, nset=Set-1, instance=DC_Skull-1
 3111,
*Nset, nset=Set-7-RP-L
 12,
*Nset, nset=Set-8-RP-R
 13,
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*Elset, elset=Set-19-brainholder, instance=Brain-Holder-Connected_Surfs-1, generate
    1,  1513,     1
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*Nset, nset=brain-base, instance=E_GMVC-1
  1363,  1374,  1399,  1434,  1480,  1481
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*Nset, nset=m_Set-9-L, instance=B_Tent_L_Falxed-1
   7,  13,  14,  41,  94, 130, 131, 202, 244, 261, 269
*Nset, nset=s_Set-9-R, instance=B_Tent_R_Falxed-1
  20,  57,  58,  99, 155, 158, 214, 236, 262, 275, 276
*Nset, nset=s_Set-12-Falx-Tent, instance=B_FALX_Surf_Straight-1
  28,  29, 151, 179, 180, 188, 190, 204, 206, 241, 242
*Nset, nset=s_Set-13-Falx_Skull_Edge, instance=B_FALX_Surf_Straight-1
   5,  10,  11,  35,  51,  58
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*Nset, nset=s_Tent_Edge_Nodes, instance=B_Tent_L_Falxed-1
  16,  33,  35,  48,  51,  53
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*Nset, nset=s_Tent_Edge_Nodes, instance=B_Tent_R_Falxed-1
   1,   3,  18,  29,  30,  48
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*Elset, elset=_CB_Surf_S3, internal, instance=B_CB_Aligned-1
  210,  307,  327,  469,  619,  638
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*Elset, elset=_CB_Surf_S4, internal, instance=B_CB_Aligned-1
   21,  173,  884,  984, 1486, 1730
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*Elset, elset=_CB_Surf_S1, internal, instance=B_CB_Aligned-1
 1868, 2054, 2083, 2770, 3559, 3710
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*Elset, elset=_CB_Surf_S2, internal, instance=B_CB_Aligned-1
  561, 1664, 1879, 2095, 2220, 2450
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*Surface, type=ELEMENT, name=CB_Surf
_CB_Surf_S3, S3
_CB_Surf_S4, S4
_CB_Surf_S2, S2
_CB_Surf_S1, S1
*Elset, elset=_CP-1-B_Tent_L_Falxed-1_SNEG, internal, instance=B_Tent_L_Falxed-1
   1,   2,   3,   4,   5,   6
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*Surface, type=ELEMENT, name=CP-1-B_Tent_L_Falxed-1
_CP-1-B_Tent_L_Falxed-1_SNEG, SNEG
*Elset, elset=_CP-1-B_Tent_R_Falxed-1_SPOS, internal, instance=B_Tent_R_Falxed-1, generate
   1,  426,    1
*Surface, type=ELEMENT, name=CP-1-B_Tent_R_Falxed-1
_CP-1-B_Tent_R_Falxed-1_SPOS, SPOS
*Elset, elset=_CP-2-B_Tent_L_Falxed-1_SNEG, internal, instance=B_Tent_L_Falxed-1
 136,
*Surface, type=ELEMENT, name=CP-2-B_Tent_L_Falxed-1
_CP-2-B_Tent_L_Falxed-1_SNEG, SNEG
*Elset, elset=_CP-2-B_Tent_R_Falxed-1_SPOS, internal, instance=B_Tent_R_Falxed-1, generate
   1,  426,    1
*Surface, type=ELEMENT, name=CP-2-B_Tent_R_Falxed-1
_CP-2-B_Tent_R_Falxed-1_SPOS, SPOS
*Elset, elset=_Falx_Surf_, internal, instance=B_FALX_Surf_Straight-1, generate
   1,  411,    1
*Surface, type=ELEMENT, name=Falx_Surf
_Falx_Surf_,
*Elset, elset=_GM_LV_Surf_S3, internal, instance=E_GMVC-1
    15,    23,   187,   237,   275,   281
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*Elset, elset=_GM_LV_Surf_S2, internal, instance=E_GMVC-1
   639,  6141,  9727, 13621, 18774, 21184, 21561, 22149
*Elset, elset=_GM_LV_Surf_S4, internal, instance=E_GMVC-1
  4168,  8808, 10492, 18585, 19610, 20926
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*Elset, elset=_GM_LV_Surf_S1, internal, instance=E_GMVC-1
  2899,  8077, 12093, 15685, 18890, 19804
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*Surface, type=ELEMENT, name=GM_LV_Surf
_GM_LV_Surf_S3, S3
_GM_LV_Surf_S2, S2
_GM_LV_Surf_S4, S4
_GM_LV_Surf_S1, S1
*Elset, elset=_GM_Outer_Surf_S3, internal, instance=E_GMVC-1
   194,   202,   255,   277,   338,   438
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*Elset, elset=_GM_Outer_Surf_S4, internal, instance=E_GMVC-1
   224,   461,   698,   738,   951,  1023
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*Elset, elset=_GM_Outer_Surf_S2, internal, instance=E_GMVC-1
   125,   411,   464,   516,   635,   693
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*Elset, elset=_GM_Outer_Surf_S1, internal, instance=E_GMVC-1
   531,   719,   924,  1306,  1373,  1863
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*Surface, type=ELEMENT, name=GM_Outer_Surf
_GM_Outer_Surf_S3, S3
_GM_Outer_Surf_S4, S4
_GM_Outer_Surf_S2, S2
_GM_Outer_Surf_S1, S1
*Elset, elset=_GM_RV_Surf_S3, internal, instance=E_GMVC-1
  2522,  3874,  4005,  4209,  4398,  4487
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*Elset, elset=_GM_RV_Surf_S1, internal, instance=E_GMVC-1
  1295,  4720,  8566, 13374, 21539, 21962
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*Elset, elset=_GM_RV_Surf_S4, internal, instance=E_GMVC-1
   360,  8073,  8557, 10641, 11050, 13756
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*Elset, elset=_GM_RV_Surf_S2, internal, instance=E_GMVC-1
   616, 10317, 12388, 17460, 21492, 21915, 21916, 21991, 22042, 22093, 22232
*Surface, type=ELEMENT, name=GM_RV_Surf
_GM_RV_Surf_S3, S3
_GM_RV_Surf_S1, S1
_GM_RV_Surf_S4, S4
_GM_RV_Surf_S2, S2
*Elset, elset=_Skull_Surf_SNEG, internal, instance=DC_Skull-1, generate
    1,  6220,     1
*Surface, type=ELEMENT, name=Skull_Surf
_Skull_Surf_SNEG, SNEG
*Elset, elset=_Tent_Surf_, internal, instance=B_Tent_L_Falxed-1
   1,   2,   3,   4,   5,   6
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*Elset, elset=_Tent_Surf_, internal, instance=B_Tent_R_Falxed-1, generate
   1,  426,    1
*Surface, type=ELEMENT, name=Tent_Surf
_Tent_Surf_,
*Elset, elset=_brain_holder_SNEG, internal, instance=Brain-Holder-Connected_Surfs-1, generate
    1,  1513,     1
*Surface, type=ELEMENT, name=brain_holder
_brain_holder_SNEG, SNEG
*Elset, elset=_non-sticky-skull_SNEG, internal, instance=DC_Skull-1
    1,    5,    6,    7,    8,    9
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*Surface, type=ELEMENT, name=non-sticky-skull
_non-sticky-skull_SNEG, SNEG
*Elset, elset=_sticky_skull_SNEG, internal, instance=DC_Skull-1
    2,    3,    4,   11,   17,   20
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*Surface, type=ELEMENT, name=sticky_skull
_sticky_skull_SNEG, SNEG
*Surface, type=NODE, name=s_Set-13-Falx_Skull_Edge_CNS_, internal
s_Set-13-Falx_Skull_Edge, 1.
*Surface, type=NODE, name=m_Set-9-L_CNS_, internal
m_Set-9-L, 1.
*Surface, type=NODE, name=s_Set-12-Falx-Tent_CNS_, internal
s_Set-12-Falx-Tent, 1.
*Surface, type=NODE, name=s_Tent_Edge_Nodes_CNS_, internal
s_Tent_Edge_Nodes, 1.
*Surface, type=NODE, name=s_Set-9-R_CNS_, internal
s_Set-9-R, 1.
*Rigid Body, ref node=DC_Skull-1.DC_Skull-RefPt_, elset=DC_Skull-1.DC_Skull
*Rigid Body, ref node=Brain-Holder-Connected_Surfs-1.Brain-Holder-Connected_Surfs-RefPt_, elset=Brain-Holder-Connected_Surfs-1.Brain-Holder-Connected_Surfs
** Constraint: Falx-Skull-Tie
*Tie, name=Falx-Skull-Tie, adjust=yes
s_Set-13-Falx_Skull_Edge_CNS_, Skull_Surf
** Constraint: Falx-Tent-Tie
*Tie, name=Falx-Tent-Tie, adjust=yes
s_Set-12-Falx-Tent_CNS_, m_Set-9-L_CNS_
** Constraint: Tent-Skull-Tie
*Tie, name=Tent-Skull-Tie, adjust=yes, type=NODE TO SURFACE
s_Tent_Edge_Nodes_CNS_, Skull_Surf
** Constraint: Tent-Tie
*Tie, name=Tent-Tie, adjust=yes
s_Set-9-R_CNS_, m_Set-9-L_CNS_
*End Assembly
*Amplitude, name=Amp-1
             0.,              0.,              1.,              1.
*Amplitude, name="Amp-1-Smooth0,1", definition=SMOOTH STEP
             0.,              0.,             0.5,            0.15
*Amplitude, name="Amp-1-Smooth0,2", definition=SMOOTH STEP
            0.5,            0.15,             2.5,             0.3
*Amplitude, name=Amp-2-Linear
             0.,              0.,              1.,              2.
*Amplitude, name=Amp-2-Smooth, definition=SMOOTH STEP
             0.,              0.,              1.,              2.
*Amplitude, name=Amp-6-BC-3, definition=SMOOTH STEP
             0.,              0.,              2.,            0.25
*Amplitude, name=Amp-7-HC
             0.,              0.,              1.,              1.
**
** MATERIALS
**
*Material, name=Brain
*Density
 1.046e-09,
*Expansion
1.,
*Hyperelastic, n=2, ogden
 0.001044,    4.309, 0.001183,    7.736,       0.,       0.
*Material, name=Membrane_Section
*Density
 1.046e-09,
*Elastic
 31.5, 0.45
**
** INTERACTION PROPERTIES
**
*Surface Interaction, name=IntProp-1
*Friction
 0.05,
*Surface Behavior, pressure-overclosure=HARD
*Fluid Behavior, name=IntProp-2-Fl-Cav
*Fluid Density
1e-09
*Fluid Expansion
-1.,
*Fluid Bulk Modulus
 0.0025,
*Surface Interaction, name=IntProp-3-cohesive
*Friction, rough
*Surface Behavior, no separation, pressure-overclosure=HARD
*Surface Interaction, name=IntProp-3-cohesive-new
*Friction, rough
*Surface Behavior, no separation, pressure-overclosure=HARD
*Cohesive Behavior
**
** CONTACT INITIALIZATION DATA
**
*Contact Initialization Data, name=CInit-1
**
** BOUNDARY CONDITIONS
**
** Name: Brain-Holder-Encastre Type: Symmetry/Antisymmetry/Encastre
*Boundary
Brain-Holder-RP, ENCASTRE
** Name: Skull_Encastre Type: Symmetry/Antisymmetry/Encastre
*Boundary
Set-1, ENCASTRE
**
** PREDEFINED FIELDS
**
** Name: Predefined Field-1-Init_Temp   Type: Temperature
*Initial Conditions, type=TEMPERATURE
GM+CB, 0.
** Name: Predefined Field-3-Fl-Cav-Init-L   Type: Fluid cavity pressure
*Initial Conditions, type=FLUID PRESSURE
Set-7-RP-L, 0.0002
** Name: Predefined Field-4-Fl-Cav-Init-R   Type: Fluid cavity pressure
*Initial Conditions, type=FLUID PRESSURE
Set-8-RP-R, 0.0002
**
** INTERACTIONS
**
** Interaction: Int-2-Fl-Cav-L
*Fluid Cavity, name=Int-2-Fl-Cav-L, behavior=IntProp-2-Fl-Cav, refnode=Set-7-RP-L, surface=GM_LV_Surf

** Interaction: Int-3-Fl-Cav-R
*Fluid Cavity, name=Int-3-Fl-Cav-R, behavior=IntProp-2-Fl-Cav, refnode=Set-8-RP-R, surface=GM_RV_Surf

** Interaction: Int-4-General_Contact-FT-brainholder
*Contact, op=NEW
*Contact Inclusions
Skull_Surf , Tent_Surf
Tent_Surf , CB_Surf
Skull_Surf , Falx_Surf
Falx_Surf , Tent_Surf
GM_Outer_Surf , CB_Surf
GM_Outer_Surf ,
Falx_Surf , GM_Outer_Surf
Tent_Surf , GM_Outer_Surf
GM_LV_Surf ,
GM_RV_Surf ,
brain_holder , GM_Outer_Surf
non-sticky-skull , CB_Surf
non-sticky-skull , GM_Outer_Surf
Skull_Surf , GM_Outer_Surf
Skull_Surf , CB_Surf
*Contact Property Assignment
 ,  , IntProp-1
** ----------------------------------------------------------------
**
** STEP: Step-1
**
*Step, name=Step-1, nlgeom=YES
*Dynamic, Explicit
, 0.5
*Bulk Viscosity
0.06, 1.2
** Mass Scaling: Semi-Automatic
**               Whole Model
*Fixed Mass Scaling, factor=5.
**
** PREDEFINED FIELDS
**
** Name: Predef Field-10-Temp-Swll-Prss-BIG   Type: Temperature
*Temperature, amplitude="Amp-1-Smooth0,1"
NodesInsideSphereBIG, 1.
** Name: Predef Field-11-Temp-NnSwll-Prss-BIG   Type: Temperature
*Temperature, amplitude="Amp-1-Smooth0,1"
NodesOutsideSphereBIG, 0.5
** Name: Predefined Field-7-Temp-CB-Prss   Type: Temperature
*Temperature, amplitude="Amp-1-Smooth0,1"
B_CB_Aligned-1.Set-1, 0.5
**
** INTERACTIONS
**
** Interaction: Int-4-General_Contact-FT-brainholder
*Contact, op=NEW
*Contact Inclusions
Skull_Surf , Tent_Surf
Tent_Surf , CB_Surf
Skull_Surf , Falx_Surf
Falx_Surf , Tent_Surf
GM_Outer_Surf , CB_Surf
GM_Outer_Surf ,
Falx_Surf , GM_Outer_Surf
Tent_Surf , GM_Outer_Surf
GM_LV_Surf ,
GM_RV_Surf ,
brain_holder , GM_Outer_Surf
Skull_Surf , GM_Outer_Surf
Skull_Surf , CB_Surf
*Contact Property Assignment
 ,  , IntProp-1
**
** OUTPUT REQUESTS
**
*Restart, write, number interval=1, time marks=NO
**
** FIELD OUTPUT: F-Output-1-bh
**
*Output, field, number interval=50
*Node Output
A, RF, U, V
*Element Output, directions=YES
E, ENER, EVOL, LE, MISES, P, PE, PEEQ, PEEQVAVG, PEVAVG, S, TEMP
*Contact Output
CFORCE, CSTRESS
**
** HISTORY OUTPUT: H-Output-1-bh
**
*Output, history, time interval=0.01
*Energy Output
ALLAE, ALLCD, ALLCW, ALLDC, ALLDMD, ALLFD, ALLIE, ALLKE, ALLMW, ALLPD, ALLPW, ALLSE, ALLVD, ALLWK, ETOTAL
*End Step
** ----------------------------------------------------------------
**
** STEP: Step-2
**
*Step, name=Step-2, nlgeom=YES
*Dynamic, Explicit
, 2.
*Bulk Viscosity
0.06, 1.2
**
** BOUNDARY CONDITIONS
**
** Name: BC-3 Type: Displacement/Rotation
*Boundary, op=NEW, amplitude=Amp-6-BC-3
Brain-Holder-RP, 1, 1, 100.
Brain-Holder-RP, 2, 2
Brain-Holder-RP, 3, 3, 50.
Brain-Holder-RP, 4, 4
Brain-Holder-RP, 5, 5
Brain-Holder-RP, 6, 6
** Name: BC-6-brainstem Type: Symmetry/Antisymmetry/Encastre
*Boundary, op=NEW
brain-base, ENCASTRE
** Name: Brain-Holder-Encastre Type: Symmetry/Antisymmetry/Encastre
*Boundary, op=NEW
** Name: Skull_Encastre Type: Symmetry/Antisymmetry/Encastre
*Boundary, op=NEW
Set-1, ENCASTRE
**
** PREDEFINED FIELDS
**
** Name: Predef Field-10-Temp-Swll-Prss-BIG   Type: Temperature
*Temperature, amplitude="Amp-1-Smooth0,2"
NodesInsideSphereBIG, 0.5
** Name: Predef Field-11-Temp-NnSwll-Prss-BIG   Type: Temperature
*Temperature, amplitude="Amp-1-Smooth0,2"
NodesOutsideSphereBIG, 0.5
** Name: Predefined Field-7-Temp-CB-Prss   Type: Temperature
*Temperature, amplitude="Amp-1-Smooth0,2"
B_CB_Aligned-1.Set-1, 0.5
**
** OUTPUT REQUESTS
**
*Restart, write, number interval=1, time marks=NO
**
** FIELD OUTPUT: F-Output-1-bh
**
*Output, field, number interval=50
*Node Output
A, RF, U, V
*Element Output, directions=YES
E, ENER, EVOL, LE, MISES, P, PE, PEEQ, PEEQVAVG, PEVAVG, S, TEMP
*Contact Output
CFORCE, CSTRESS
**
** HISTORY OUTPUT: H-Output-1-bh
**
*Output, history, time interval=0.04
*Energy Output
ALLAE, ALLCD, ALLCW, ALLDC, ALLDMD, ALLFD, ALLIE, ALLKE, ALLMW, ALLPD, ALLPW, ALLSE, ALLVD, ALLWK, ETOTAL
*End Step
